*Heading
** Job name: RC_Beam_3Point_Bending Model name: Model-1
** Generated by: Abaqus/CAE 2021.HF6
*Preprint, echo=NO, model=NO, history=NO, contact=NO
**
** PARTS
**
*Part, name=Beam
*Node
      1,         100.,         250.,        1900.
      2,         100.,        -250.,        1900.
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*Element, type=C3D8I
   1,  204, 1809, 5377, 1497,    1,   25,  665,  108
   2, 1809, 1810, 5378, 5377,   25,   26,  666,  665
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*Nset, nset=_PickedSet8, internal, generate
     1,  14400,      1
*Elset, elset=_PickedSet8, internal, generate
     1,  11781,      1
** Section: Section-Beam
*Solid Section, elset=_PickedSet8, controls=EC-1, material=Concrete_Damage
,
*End Part
**
*Part, name="Comp Rebar"
*Node
      1,       -1425.,        -120.,           0.
      2,       -1425.,         -20.,           0.
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*Element, type=T3D2
1, 2, 7
2, 7, 8
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*Nset, nset=_PickedSet10, internal, generate
   1,  105,    1
*Elset, elset=_PickedSet10, internal, generate
   1,  104,    1
** Section: Section-truss10
*Solid Section, elset=_PickedSet10, material=Steel_Rebar
79.,
*End Part
**
*Part, name=Stirrup
*Node
      1,         -80.,        -205.,           0.
      2,         -60.,        -225.,           0.
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*Element, type=T3D2
1, 1, 9
2, 9, 2
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*Nset, nset=_PickedSet9, internal, generate
  1,  50,   1
*Elset, elset=_PickedSet9, internal, generate
  1,  50,   1
** Section: Section-truss10
*Solid Section, elset=_PickedSet9, material=Steel_Rebar
79.,
*End Part
**
*Part, name=Support
*Node
      1,   -14.205883,  -98.9858246,           0.
      2,  -15.9479494,           0.,           0.
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*Element, type=C3D8R
  1,  29,  32,   9,   8,  85,  88,  65,  64
  2,  32,  31,  10,   9,  88,  87,  66,  65
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*Nset, nset=_PickedSet2, internal, generate
   1,  560,    1
*Elset, elset=_PickedSet2, internal, generate
   1,  387,    1
** Section: Section-Support
*Solid Section, elset=_PickedSet2, material="Steel Elastic"
,
*End Part
**
*Part, name="Tensile Rebar"
*Node
      1,       -1425.,         300.,           0.
      2,       -1425.,          20.,           0.
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*Element, type=T3D2
 1,  2,  7
 2,  7,  8
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*Nset, nset=_PickedSet9, internal, generate
   1,  117,    1
*Elset, elset=_PickedSet9, internal, generate
   1,  116,    1
** Section: Section-truss20
*Solid Section, elset=_PickedSet9, material=Steel_Rebar
314.,
*End Part
**
**
** ASSEMBLY
**
*Assembly, name=Assembly
**
*Instance, name=Beam-1, part=Beam
*End Instance
**
*Instance, name=Stirrup-1, part=Stirrup
          0.,           0.,        2900.
*End Instance
**
*Instance, name="Tensile Rebar-1", part="Tensile Rebar"
          0.,        -210.,        1500.
          0.,        -210.,        1500.,           0., -208.999999987312,        1500., 89.9999992730282
*End Instance
**
*Instance, name=Stirrup-1-lin-2-1, part=Stirrup
          0.,           0.,        2700.
*End Instance
**
*Instance, name=Stirrup-1-lin-3-1, part=Stirrup
          0.,           0.,        2500.
*End Instance
**
*Instance, name=Stirrup-1-lin-4-1, part=Stirrup
          0.,           0.,        2300.
*End Instance
**
*Instance, name=Stirrup-1-lin-5-1, part=Stirrup
          0.,           0.,        2100.
*End Instance
**
*Instance, name=Stirrup-1-lin-6-1, part=Stirrup
          0.,           0.,        1900.
*End Instance
**
*Instance, name=Stirrup-1-lin-7-1, part=Stirrup
          0.,           0.,        1700.
*End Instance
**
*Instance, name=Stirrup-1-lin-8-1, part=Stirrup
          0.,           0.,        1500.
*End Instance
**
*Instance, name=Stirrup-1-lin-9-1, part=Stirrup
          0.,           0.,        1300.
*End Instance
**
*Instance, name=Stirrup-1-lin-10-1, part=Stirrup
          0.,           0.,        1100.
*End Instance
**
*Instance, name=Stirrup-1-lin-11-1, part=Stirrup
          0.,           0.,         900.
*End Instance
**
*Instance, name=Stirrup-1-lin-12-1, part=Stirrup
          0.,           0.,         700.
*End Instance
**
*Instance, name=Stirrup-1-lin-13-1, part=Stirrup
          0.,           0.,         500.
*End Instance
**
*Instance, name=Stirrup-1-lin-14-1, part=Stirrup
          0.,           0.,         300.
*End Instance
**
*Instance, name=Stirrup-1-lin-15-1, part=Stirrup
          0.,           0.,         100.
*End Instance
**
*Instance, name="Tensile Rebar-1-lin-2-1", part="Tensile Rebar"
        -65.,        -210.,        1500.
        -65.,        -210.,        1500.,         -65., -208.999999987312,        1500., 89.9999992730282
*End Instance
**
*Instance, name="Tensile Rebar-1-lin-2-1-1", part="Tensile Rebar"
         65.,        -210.,        1500.
         65.,        -210.,        1500.,          65., -208.999999987312,        1500., 89.9999992730282
*End Instance
**
*Instance, name=Support2-1, part=Support
       -100.,         350.,        1900.
       -100.,         350.,        1900.,        -100., 351.000000012688,        1900., 89.9999992730282
*End Instance
**
*Instance, name=Support2-2, part=Support
       -100.,        -350.,        2900.
       -100.,        -350.,        2900., -99.2928932098417,        -350., 2900.70710679016,         180.
*End Instance
**
*Instance, name=Support2-3, part=Support
       -100.,        -350.,         100.
       -100.,        -350.,         100., -99.2928932098417,        -350., 100.707106790158,         180.
*End Instance
**
*Instance, name=Support2-1-lin-2-1, part=Support
       -100.,         350.,        1100.
       -100.,         350.,        1100.,        -100., 351.000000012688,        1100., 89.9999992730282
*End Instance
**
*Instance, name="Comp Rebar-1", part="Comp Rebar"
         65.,         215.,        1500.
         65.,         215.,        1500.,          65., 216.000000012688,        1500., 89.9999992730282
*End Instance
**
*Instance, name="Comp Rebar-1-lin-2-1", part="Comp Rebar"
        -65.,         215.,        1500.
        -65.,         215.,        1500.,         -65., 216.000000012688,        1500., 89.9999992730282
*End Instance
**
*Nset, nset=_PickedSet65, internal, instance=Beam-1
   15,   16,   18,   19,   21,   22
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*Elset, elset=_PickedSet65, internal, instance=Beam-1
 7175, 7176, 7177, 7178, 7179, 7180
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*Nset, nset=_PickedSet68, internal, instance=Support2-1
   2,   3,   4,  16,  17,  18
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*Elset, elset=_PickedSet68, internal, instance=Support2-1
   8,  12,  16,  20,  21,  25
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*Nset, nset=_PickedSet74, internal, instance=Support2-2
   2,   3,   4,  16,  17,  18
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*Nset, nset=_PickedSet74, internal, instance=Support2-3
   2,   3,   4,  16,  17,  18
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*Elset, elset=_PickedSet74, internal, instance=Support2-2
   8,  12,  16,  20,  21,  25
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*Elset, elset=_PickedSet74, internal, instance=Support2-3
   8,  12,  16,  20,  21,  25
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*Nset, nset=_PickedSet78, internal, instance=Support2-1
   2,   3,   4,  16,  17,  18
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*Nset, nset=_PickedSet78, internal, instance=Support2-1-lin-2-1
   2,   3,   4,  16,  17,  18
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*Elset, elset=_PickedSet78, internal, instance=Support2-1
   8,  12,  16,  20,  21,  25
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*Elset, elset=_PickedSet78, internal, instance=Support2-1-lin-2-1
   8,  12,  16,  20,  21,  25
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*Nset, nset=_PickedSet83, internal, instance=Stirrup-1, generate
  1,  50,   1
*Nset, nset=_PickedSet83, internal, instance="Tensile Rebar-1", generate
   1,  117,    1
*Nset, nset=_PickedSet83, internal, instance=Stirrup-1-lin-3-1, generate
  1,  50,   1
*Nset, nset=_PickedSet83, internal, instance=Stirrup-1-lin-5-1, generate
  1,  50,   1
*Nset, nset=_PickedSet83, internal, instance=Stirrup-1-lin-13-1, generate
  1,  50,   1
*Nset, nset=_PickedSet83, internal, instance=Stirrup-1-lin-9-1, generate
  1,  50,   1
*Nset, nset=_PickedSet83, internal, instance=Stirrup-1-lin-7-1, generate
  1,  50,   1
*Nset, nset=_PickedSet83, internal, instance=Stirrup-1-lin-15-1, generate
  1,  50,   1
*Nset, nset=_PickedSet83, internal, instance=Stirrup-1-lin-11-1, generate
  1,  50,   1
*Nset, nset=_PickedSet83, internal, instance="Tensile Rebar-1-lin-2-1-1", generate
   1,  117,    1
*Nset, nset=_PickedSet83, internal, instance=Stirrup-1-lin-2-1, generate
  1,  50,   1
*Nset, nset=_PickedSet83, internal, instance=Stirrup-1-lin-6-1, generate
  1,  50,   1
*Nset, nset=_PickedSet83, internal, instance=Stirrup-1-lin-14-1, generate
  1,  50,   1
*Nset, nset=_PickedSet83, internal, instance=Stirrup-1-lin-10-1, generate
  1,  50,   1
*Nset, nset=_PickedSet83, internal, instance="Tensile Rebar-1-lin-2-1", generate
   1,  117,    1
*Nset, nset=_PickedSet83, internal, instance=Stirrup-1-lin-4-1, generate
  1,  50,   1
*Nset, nset=_PickedSet83, internal, instance=Stirrup-1-lin-8-1, generate
  1,  50,   1
*Nset, nset=_PickedSet83, internal, instance=Stirrup-1-lin-12-1, generate
  1,  50,   1
*Nset, nset=_PickedSet83, internal, instance="Comp Rebar-1", generate
   1,  105,    1
*Nset, nset=_PickedSet83, internal, instance="Comp Rebar-1-lin-2-1", generate
   1,  105,    1
*Elset, elset=_PickedSet83, internal, instance=Stirrup-1, generate
  1,  50,   1
*Elset, elset=_PickedSet83, internal, instance="Tensile Rebar-1", generate
   1,  116,    1
*Elset, elset=_PickedSet83, internal, instance=Stirrup-1-lin-3-1, generate
  1,  50,   1
*Elset, elset=_PickedSet83, internal, instance=Stirrup-1-lin-5-1, generate
  1,  50,   1
*Elset, elset=_PickedSet83, internal, instance=Stirrup-1-lin-13-1, generate
  1,  50,   1
*Elset, elset=_PickedSet83, internal, instance=Stirrup-1-lin-9-1, generate
  1,  50,   1
*Elset, elset=_PickedSet83, internal, instance=Stirrup-1-lin-7-1, generate
  1,  50,   1
*Elset, elset=_PickedSet83, internal, instance=Stirrup-1-lin-15-1, generate
  1,  50,   1
*Elset, elset=_PickedSet83, internal, instance=Stirrup-1-lin-11-1, generate
  1,  50,   1
*Elset, elset=_PickedSet83, internal, instance="Tensile Rebar-1-lin-2-1-1", generate
   1,  116,    1
*Elset, elset=_PickedSet83, internal, instance=Stirrup-1-lin-2-1, generate
  1,  50,   1
*Elset, elset=_PickedSet83, internal, instance=Stirrup-1-lin-6-1, generate
  1,  50,   1
*Elset, elset=_PickedSet83, internal, instance=Stirrup-1-lin-14-1, generate
  1,  50,   1
*Elset, elset=_PickedSet83, internal, instance=Stirrup-1-lin-10-1, generate
  1,  50,   1
*Elset, elset=_PickedSet83, internal, instance="Tensile Rebar-1-lin-2-1", generate
   1,  116,    1
*Elset, elset=_PickedSet83, internal, instance=Stirrup-1-lin-4-1, generate
  1,  50,   1
*Elset, elset=_PickedSet83, internal, instance=Stirrup-1-lin-8-1, generate
  1,  50,   1
*Elset, elset=_PickedSet83, internal, instance=Stirrup-1-lin-12-1, generate
  1,  50,   1
*Elset, elset=_PickedSet83, internal, instance="Comp Rebar-1", generate
   1,  104,    1
*Elset, elset=_PickedSet83, internal, instance="Comp Rebar-1-lin-2-1", generate
   1,  104,    1
*Nset, nset=_PickedSet84, internal, instance=Beam-1, generate
     1,  14400,      1
*Elset, elset=_PickedSet84, internal, instance=Beam-1, generate
     1,  11781,      1
** Constraint: Constraint-4
*Embedded Element, host elset=_PickedSet84
_PickedSet83
*End Assembly
**
** ELEMENT CONTROLS
**
*Section Controls, name=EC-1, ELEMENT DELETION=YES
1., 1., 1.
*Amplitude, name=Amp-1
             0.,              0.,             10.,              1.
**
** MATERIALS
**
*Material, name=Concrete_Damage
*Density
 2.5e-09,
*Elastic
20111., 0.2
*Concrete Damaged Plasticity
40.,    0.1,   1.16, 0.6667,     0.
*Concrete Compression Hardening
 24.5,          0.
 29.1, 0.000638796
 26.6,  0.00156087
 22.3,  0.00257523
 18.4,  0.00357331
 15.1,  0.00453257
 12.7,  0.00545631
 11.2,  0.00613054
  7.5,  0.00820387
   5.,   0.0103282
*Concrete Tension Stiffening
  3.6,          0.
 2.94, 0.000132818
 2.25, 0.000367127
 1.94, 0.000482791
 1.62, 0.000598454
 1.08, 0.000925081
 0.73,  0.00114291
  0.5,  0.00515414
*Concrete Compression Damage
   0.,          0.
   0., 1.98359e-06
   0., 6.69643e-05
   0., 0.000638796
 0.08,  0.00156087
 0.23,  0.00257523
 0.37,  0.00357331
 0.48,  0.00453257
 0.56,  0.00545631
 0.62,  0.00613054
 0.74,  0.00820387
 0.83,   0.0103282
*Concrete Tension Damage
   0.,          0.
 0.18, 0.000132818
 0.38, 0.000367127
 0.46, 0.000482791
 0.55, 0.000598454
  0.7, 0.000925081
 0.81,  0.00114291
 0.86,  0.00515414
*Material, name="Steel Elastic"
*Density
 7.85e-09,
*Elastic
200000., 0.3
*Material, name=Steel_Rebar
*Density
 8e-09,
*Elastic
200000., 0.3
*Plastic
372.,   0.
509., 0.28
**
** INTERACTION PROPERTIES
**
*Surface Interaction, name=IntProp-1
*Friction
 0.35,
*Surface Behavior, pressure-overclosure=HARD
**
** BOUNDARY CONDITIONS
**
** Name: BC-1 Type: Symmetry/Antisymmetry/Encastre
*Boundary
_PickedSet74, PINNED
** Name: BC-3 Type: Displacement/Rotation
*Boundary
_PickedSet65, 1, 1
**
** INTERACTIONS
**
** Interaction: Int-1
*Contact, op=NEW
*Contact Inclusions, ALL EXTERIOR
*Contact Property Assignment
 ,  , IntProp-1
** ----------------------------------------------------------------
**
** STEP: Loading-Step
**
*Step, name=Loading-Step, nlgeom=YES
*Dynamic, Explicit
, 10.
*Bulk Viscosity
0.06, 1.2
**
** BOUNDARY CONDITIONS
**
** Name: BC-2 Type: Displacement/Rotation
*Boundary, amplitude=Amp-1
_PickedSet78, 1, 1
_PickedSet78, 2, 2, -20.
_PickedSet78, 3, 3
**
** OUTPUT REQUESTS
**
*Restart, write, number interval=1, time marks=NO
**
** FIELD OUTPUT: F-Output-1
**
*Output, field, time interval=0.2
*Node Output
A, RF, U, V
*Element Output, directions=YES
DAMAGEC, DAMAGESHR, DAMAGET, LE, PE, PEEQ, S, STATUS
**
** HISTORY OUTPUT: H-Output-1
**
*Output, history, variable=PRESELECT
*End Step
